// COMSOL Multiphysics 6.3.0.290 model "single_pipe_no_mesh.mph"
// Outline of the model tree

Functions
  rect1: Rectangle | lower = 0; upper = 1
  an1: Analytic | funcname = pulse; expr = rect1(t); args = t; argunit = s

Geometry
  geom1 "Geometry 1" (3D, length unit m)
    cyl1: Cylinder | r = 10E-6; h = 3E-5
    fin: Finalize "Form Union"

Materials
  mat1: Common "H2O (water) [liquid]" on all domains
    def: def "Basic"
      thermalconductivity = k_liquid_2(T)
      thermalexpansioncoefficient = (alpha_liquid_2(T)+(Tempref-293[K])*if(abs(T-Tempref)>1e-3,(alpha_liquid_2(T)-alpha_liquid_2(Tempref))/(T-Tempref),d(alpha_liquid_2(T),T)))/(1+alpha_liquid_2(Tempref)*(Tempref-293[K]))
      heatcapacity = C_liquid_2(T)
      HC = HC_liquid_2(T)
      VP = VP_liquid_2(T)
      density = rho_liquid_2(T)
      TD = TD_liquid_2(T)
      dynamicviscosity = eta_liquid_1(T)
      SurfF = SurfF(T)
      k_liquid_2: Piecewise | arg = T; pieces = {275.0, 370.0, -0.9003748+0.008387698*T^1-1.118205E-5*T^2}; argunit = K; fununit = W/(m*K)
      alpha_liquid_2: Piecewise
        arg = T
        pieces = 
          {273.15, 283.0, 0.01032507-7.62815E-5*T^1+1.412474E-7*T^2}
          {283.0, 373.16, -0.002464189354+1.947611E-5*T^1-5.049672E-8*T^2+4.616995E-11*T^3}
        argunit = K
        fununit = 1/K
      C_liquid_2: Piecewise | arg = T; pieces = {293.0, 373.16, 4035.840794+0.4923120336*T^1}; argunit = K; fununit = J/(kg*K)
      HC_liquid_2: Piecewise | arg = T; pieces = {293.0, 373.16, 72.6451184+0.008861615768*T^1}; argunit = K; fununit = J/(mol*K)
      VP_liquid_2: Piecewise | arg = T; pieces = {280.0, 600.0, (exp((-2.005121830e+03/T-5.565700000e-01*log10(T)+9.898790000e+00-1.111690086e+07/T^3)*log(10.0)))*1.333200000e+02}; argunit = K; fununit = Pa
      rho_liquid_2: Piecewise
        arg = T
        pieces = 
          {273.15, 283.0, 972.7578145+0.2084*T^1-4.0E-4*T^2}
          {283.0, 373.16, 345.28+5.749816*T^1-0.0157244*T^2+1.264375E-5*T^3}
        argunit = K
        fununit = kg/m^3
      TD_liquid_2: Piecewise | arg = T; pieces = {273.15, 333.16, 8.04E-8+2.0E-10*T^1}; argunit = K; fununit = m^2/s
      eta_liquid_1: Piecewise | arg = T; pieces = {265.0, 423.16, exp(1.47297892E+11/T^4 - 1.56916127E+09/T^3 + 6.52798499E+06/T^2 - 1.10421451E+04/T - 2.86320560E+00)}; argunit = K; fununit = Pa*s
      SurfF: Piecewise
        arg = T
        pieces = 
          {274.0, 568.0, 0.0774685638+2.071003E-4*T^1-1.23147E-6*T^2+2.344068E-9*T^3-3.033107E-12*T^4+1.758716E-15*T^5}
          {568.0, 647.0, -109.3735+0.9291756*T^1-0.003154159*T^2+5.351438E-6*T^3-4.539449E-9*T^4+1.540327E-12*T^5}
        argunit = K
        fununit = N/m
    ThermalExpansion: ThermalExpansion
      alphatan = CTE_liquid_2(T)
      dL = (dL_liquid_2(T)-dL_liquid_2(Tempref))/(1+dL_liquid_2(Tempref))
      dL_liquid_2: Piecewise
        arg = T
        pieces = 
          {273.15, 283.0, 0.008486347802-6.947021E-5*T^1+1.333373E-7*T^2}
          {283.0, 373.16, 0.2324466367-0.002030447*T^1+5.510259E-6*T^2-4.395999E-9*T^3}
        argunit = K
      CTE_liquid_2: Piecewise
        arg = T
        pieces = 
          {273.15, 283.0, -6.947321E-5+2.666746E-7*T^1}
          {283.0, 293.0, -0.01363714988+8.893977E-5*T^1-1.43925E-7*T^2}
          {293.0, 373.16, -0.002030450346+1.102052E-5*T^1-1.3188E-8*T^2}
        argunit = K
        fununit = 1/K
  mat2: Common "NaOH [liquid]" on no domains
    def: def "Basic"
      resistivity = res(T)
      thermalexpansioncoefficient = (alpha(T)+(Tempref-598[K])*if(abs(T-Tempref)>1e-3,(alpha(T)-alpha(Tempref))/(T-Tempref),d(alpha(T),T)))/(1+alpha(Tempref)*(Tempref-598[K]))
      heatcapacity = C_liquid_2(T)
      electricconductivity = sigma(T)
      HC = HC_liquid_2(T)
      VP = VP(T)
      density = rho(T)
      dynamicviscosity = eta(T)
      res: Piecewise | arg = T; pieces = {593.0, 723.16, exp(1.45342297E+03/T - 7.80343914E+00)}; argunit = K; fununit = ohm*m
      alpha: Piecewise | arg = T; pieces = {598.0, 823.16, 8.8183989E-5+1.33962989E-8*T^1+4.79416217E-12*T^2}; argunit = K; fununit = 1/K
      C_liquid_2: Piecewise | arg = T; pieces = {596.0, 1800.16, 219660.0*T^-2+2238.5446-0.1458124*T^1}; argunit = K; fununit = J/(kg*K)
      sigma: Piecewise | arg = T; pieces = {593.0, 723.16, 1/(exp(1.45342297E+03/T-7.80343914E+00))}; argunit = K; fununit = S/m
      HC_liquid_2: Piecewise | arg = T; pieces = {596.0, 1800.16, 8786.4*T^-2+89.541784-0.005832496*T^1}; argunit = K; fununit = J/(mol*K)
      VP: Piecewise | arg = T; pieces = {880.0, 1651.0, (exp(-4.28458865E-12*T^4 + 2.96317936E-08*T^3 - 8.01810674E-05*T^2 + 1.06065002E-01*T - 5.14433625E+01))*1.333200000e+02}; argunit = K; fununit = Pa
      rho: Piecewise | arg = T; pieces = {598.0, 823.16, 2101.73333-0.5251*T^1}; argunit = K; fununit = kg/m^3
      eta: Piecewise | arg = T; pieces = {623.0, 823.16, exp(2.48443640E+03/T - 9.53731783E+00)}; argunit = K; fununit = Pa*s
    ThermalExpansion: ThermalExpansion
      alphatan = CTE(T)
      dL = (dL(T)-dL(Tempref))/(1+dL(Tempref))
      dL: Piecewise | arg = T; pieces = {598.0, 823.16, -0.0524625658+7.85745656E-5*T^1+1.40438605E-8*T^2+1.37497326E-12*T^3+1.24178834E-15*T^4}; argunit = K
      CTE: Piecewise | arg = T; pieces = {598.0, 823.16, 8.03347116E-5+2.05954466E-8*T^1+1.47124072E-11*T^2}; argunit = K; fununit = 1/K

Physics
  spf: LaminarFlow on all domains
    dependent variable u = {u, v, w}
    fp1: FluidProperties (default)
    init1: init "Initial Values 1" (default)
    wallbc1: WallBC "Wall 1" (default)
    inl1: InletBoundary "Inlet 1" on boundaries 4
      BoundaryCondition = FullyDevelopedFlow
      FullyDevelopedFlowOption = V0
      V0fdf = 1.66667E-11
    out1: OutletBoundary "Outlet 1" on boundaries 3
  tds: DilutedSpecies "Transport of Diluted Species" on all domains
    dependent variable c
    cdm1: Fluid (default) | u_src = root.comp1.u; DiffusionMaterialList = mat2; D_c = 2.125E-9[m^2/s]
    nflx1: NoFlux (default)
    init1: init "Initial Values 1" (default)
    in1: Inflow on boundaries 4 | c0 = 10*pulse(t)
    out1: Outflow on boundaries 3

Multiphysics
  rfd1: ReactingFlowDS "Reacting Flow, Diluted Species 1" on all domains | Fluid_physics = spf; Species_physics = tds

Mesh
  mesh1 "Mesh 1" (physics-controlled)
    size: MeshSizeDefault | table = cfd; hauto = 6

Studies
  std1 "Study 1"
    stat: Stationary | solve for = {spf}
  std2 "Study 2"
    time: Transient "Time Dependent"
      tlist = range(0,0.1,5)
      solve for = {tds}
      useinitsol = on
      initstudy = std1
      usesol = on
      notstudy = std1

Solver configurations
  sol1 "Solution 1" (study std1)
    v1: Variables "Dependent Variables 1"
    s1: Stationary "Stationary Solver 1"
      fc1: FullyCoupled
      d1: Direct "Direct, fluid flow variables (spf)"
  sol2 "Solution 2" (study std2)
    v1: Variables "Dependent Variables 1"
    t1: Time "Time-Dependent Solver 1"
      fc1: FullyCoupled
      d1: Direct "Direct, concentrations (tds)"

Datasets
  dset1: Solution | solution = sol1
  surf1: Surface "Exterior Walls" on boundaries 1, 2, 5, 6 | data = dset1
  dset2: Solution | solution = sol2

Derived values
  av1: AvSurface "Surface Average 1" on boundaries 3 | data = dset2; table = tbl1; expr = c

Tables
  tbl1: Table
    // Surface Average 1
    Time (s) | Molar concentration, c (mol/m^3)
    0 | -1.16204e-18
    0.1 | 2.57875
    0.2 | 5.85482
    0.3 | 7.70518
    0.4 | 8.72921
    0.5 | 9.30755
    0.6 | 9.62812
    0.7 | 9.80067
    0.8 | 9.89363
    0.9 | 9.94765
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
Plots
  pg1: PlotGroup3D "Velocity (spf)" | data = dset1
    vol1: Volume | expr = spf.U
  pg2: PlotGroup3D "Pressure (spf)" | data = surf1
    surf1: Surface | expr = p
      tran1: Transparency
  pg3: PlotGroup3D "Concentration, Streamline (tds)" | data = dset2
    str1: Streamline
      expr = {tds.tflux_cx, tds.tflux_cy, tds.tflux_cz}
      linetype = ribbon
      pointtype = arrow
      arrowlength = logarithmic
      col: Color "Color Expression" | expr = c
  pg4: PlotGroup3D "Concentration, Surface (tds)" | data = dset2; typeintitle = off
    surf1: Surface | expr = c
  pg5: PlotGroup1D "1D Plot Group 5" | data = none
    tblp1: Table "Table Graph 1" | table = tbl1